# Динамика КА. ДЗ №1
вариант := 9
# [Excel component]
    tab1 := excel["A2:I17"]
get_tab1(вар) :=
    row ← 0
    for i ∈ (1 .. rows(tab1) - 1)
        if tab1[i, 0] == вар
            row ← i
            break
    for i ∈ 1 .. 8
        l[i] ← tab1[row, i]
    return l
l := get_tab1(вариант)
l[1] = 2
l[2] = 5
l[3] = 10
l[4] = 12
l[5] = 14
l[6] = 20
l[7] = 21
l[8] = 23
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m(x) :=
    if x ≤ l[1]
        return 1600
    else if x ≤ l[2]
        return 1400
    else if x ≤ l[4]
        return 100
    else if x ≤ l[5]
        return 400
    else if x ≤ l[7]
        return 200
    else
        return 850
EJ(x) :=
    if x ≤ l[1]
        return 8.75*10^4
    else if x ≤ l[2]
        return 6.25*10^4
    else if x ≤ l[4]
        return 3*10^4
    else if x ≤ l[5]
        return 4.75*10^4
    else if x ≤ l[7]
        return 2.50*10^4
    else
        return 8.75*10^4
# 1. Осреднение характеристик
# Общая длина балки
L := l[8] = 23
# Средняя погонная масса балки
μ := 1/L*sum((l[i] - l[i - 1])*m(l[i]), i = 1 .. 8) = 521.739
# Средняя (интегральная) погонная жёсткость балки:
EI := 1/L*sum((l[i] - l[i - 1])*EJ(l[i]), i = 1 .. 8) = 44239.1
k := 0 .. 4
# 2. Частоты и ненормированные формы колебаний
# Таблица собственных чисел и частот форм колебаний:
λ_kL := [4.7300; 7.8530; 10.9960; 14.1370; 17.2790]
λ[k] := round(λ_kL[k]/L, 4) = [0.2057; 0.3414; 0.4781; 0.6147; 0.7513]
ω[k] := round(λ[k]^2*sqrt(EI/μ), 4) = [0.3896; 1.0733; 2.1048; 3.4794; 5.1976]
# [Excel component]
    excel["B4:B8"] := λ_kL
    excel["C4:C8"] := λ
    excel["D4:D8"] := ω
S_1(x, λ_k) := 1/2*(cosh(λ_k*x) + cos(λ_k*x))  # S
S_2(x, λ_k) := 1/2*(sinh(λ_k*x) + sin(λ_k*x))  # T
# Это функции Крылова
S_3(x, λ_k) := 1/2*(cosh(λ_k*x) - cos(λ_k*x))  # U
S_4(x, λ_k) := 1/2*(sinh(λ_k*x) - sin(λ_k*x))  # V
U_1тв(x) := 1
U_2тв(x) := x*2/L - 1
U_упр(x, λ_k) := S_1(x, λ_k) - S_3(L, λ_k)/S_4(L, λ_k)*S_2(x, λ_k)
U_1упр(x) := U_упр(x, λ[0])
U_2упр(x) := U_упр(x, λ[1])
U_3упр(x) := U_упр(x, λ[2])
U_4упр(x) := U_упр(x, λ[3])
U_5упр(x) := U_упр(x, λ[4])
# Ненормированные функции форм
U := [U_1тв; U_2тв; U_1упр; U_2упр; U_3упр; U_4упр; U_5упр]
k := 0 .. 10
x[k] := k*L/10
tab :=
    for n ∈ 0 .. 6
        for k ∈ 0 .. 10
            tab[n, k] ← round(U[n](x[k]), 4)
    return tab
# [Excel component]
    excel["B2:K2"] := transpose(x)
    excel["B3:L9"] := tab
# 3. Нормировка форм колебаний
n := 0 .. 6
# Нормирующий множитель
N[n] := round(1/sqrt(sum((l[k] - l[k - 1])*m(l[k])*U[n](l[k])^2, k = 1 .. 8)), 4) = [0.0091; 0.0128; 0.0168; 0.0175; 0.0159; 0.0162; 0.0187]
# [Excel component]
    excel["B2:H2"] := transpose(N)
tab :=
    for n ∈ 0 .. 6
        for k ∈ 0 .. 10
            tab[n, k] ← round(U[n](x[k])*N[n], 4)
    return tab
# [Excel component]
    excel["B2:K2"] := transpose(x)
    excel["B3:L9"] := tab
f_1тв(x) := U_1тв'(x)*N[0]
f_2упр(x) := U_2упр'(x)*N[3]
f_5упр(x) := U_5упр'(x)*N[6]
f_2тв(x) := U_2тв'(x)*N[1]
f_3упр(x) := U_3упр'(x)*N[4]
f_1упр(x) := U_1упр'(x)*N[2]
f_4упр(x) := U_4упр'(x)*N[5]
f_ := transpose([f_1тв, f_2тв, f_1упр, f_2упр, f_3упр, f_4упр, f_5упр])
tab :=
    for n ∈ 0 .. 6
        for k ∈ 0 .. 10
            tab[n, k] ← round(f_[n](x[k]), 4)
    return tab
# [Excel component]
    excel["B2:K2"] := transpose(x)
    excel["B3:L9"] := tab
f_1тв(x) := U_1тв(x)*N[0]
f_2упр(x) := U_2упр(x)*N[3]
f_5упр(x) := U_5упр(x)*N[6]
f_2тв(x) := U_2тв(x)*N[1]
f_3упр(x) := U_3упр(x)*N[4]
f_1упр(x) := U_1упр(x)*N[2]
f_4упр(x) := U_4упр(x)*N[5]
f := transpose([f_1тв, f_2тв, f_1упр, f_2упр, f_3упр, f_4упр, f_5упр])
i := 0 .. 1000
x[i] := i*L/1000
# [plot: f[0](x[i]) vs x[i]]
f_1тв
# [plot: f_[0](x[i]) vs x[i]]
f_1тв'
x
x
# [plot: f[1](x[i]) vs x[i]]
f_2тв
# [plot: f_[1](x[i]) vs x[i]]
f_2тв'
x
x
# [plot: f[2](x[i]) vs x[i]]
f_1упр
# [plot: f_[2](x[i]) vs x[i]]
f_1упр'
x
x
# [plot: f[3](x[i]) vs x[i]]
f_2упр
# [plot: f_[3](x[i]) vs x[i]]
f_2упр'
x
x
# [plot: f[4](x[i]) vs x[i]]
f_3упр
# [plot: f_[4](x[i]) vs x[i]]
f_3упр'
x
x
# [plot: f[5](x[i]) vs x[i]]
f_4упр
# [plot: f_[5](x[i]) vs x[i]]
f_4упр'
x
x
# [plot: f[5](x[i]) vs x[i]]
f_упр
# [plot: f_[5](x[i]) vs x[i]]
f_4упр'
x
x
