# Динамика КА. ДЗ №2
вариант := 9
# Условия из первого ДЗ1
# [Excel component]
    tab1 := excel["A2:I17"]
get_tab1(вар) :=
    row ← 0
    for i ∈ (1 .. rows(tab1) - 1)
        if tab1[i, 0] == вар
            row ← i
            break
    for i ∈ 1 .. 8
        l[i] ← tab1[row, i]
    return l
l := get_tab1(вариант)
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l[1] = 2
l[2] = 5
l[3] = 10
l[4] = 12
l[5] = 14
l[6] = 20
l[7] = 21
l[8] = 23
m_(x) :=
    if x ≤ l[1]
        return 1600
    else if x ≤ l[2]
        return 1400
    else if x ≤ l[4]
        return 100
    else if x ≤ l[5]
        return 400
    else if x ≤ l[7]
        return 200
    else
        return 850
EJ(x) :=
    if x ≤ l[1]
        return 8.75*10^4
    else if x ≤ l[2]
        return 6.25*10^4
    else if x ≤ l[4]
        return 3*10^4
    else if x ≤ l[5]
        return 4.75*10^4
    else if x ≤ l[7]
        return 2.50*10^4
    else
        return 8.75*10^4
get_F(вар, T) :=
    if 1 ≤ вар ≤ 3
        F(t) ← (вар + 4)/T*10^3
    else if 4 ≤ вар ≤ 7
        F(t) ← 30*t*(T - t)/T^3*10^3
    else if 8 ≤ вар ≤ 11
        F(t) ← 10*t/T^2*10^3
    else
        F(t) ← 10*(T - t)/T^2*10^3
    return F
# Условия из второго домашнего задания:
# [Excel component]
    tab2 := excel["A2:C17"]
get_tab2(вар) :=
    row ← вар - 1
    T ← tab2[row, 1]
    Δt ← tab2[row, 2]
    F ← get_F(вар, T)
    return [T, Δt, F]
[T, Δt, F] := get_tab2(вариант)
T = 1.3  # с
Δt = 0.15  # с
# 1. Определение массы и эталонной скорости отделения
# Общая длина балки
L := l[8] = 23
# Средняя погонная масса балки
μ := round(1/L*sum((l[i] - l[i - 1])*m_(l[i]), i = 1 .. 8), 4) = 521.739  # кг/м
# Средняя (интегральная) погонная жёсткость балки:
EI := round(1/L*sum((l[i] - l[i - 1])*EJ(l[i]), i = 1 .. 8), 4) = 44239.1  # кг*м^3/с^2
# Тогда общая масса балки(отделения):
m := L*μ = 12000  # кг
# Импульс хуимпульс:
P := round(integral(F(t), t = 0 .. T), 4) = 5000  # кг*м/с
# Эталонная скорость:
v_эт := 2*P/m = 0.833333  # м/с
k := 0 .. 2
# Расчёт из первого ДЗ, можно мотать до нормированный форм
λ_kL := [4.7300; 7.8530; 10.9960]
λ[k] := round(λ_kL[k]/L, 4) = [0.2057; 0.3414; 0.4781]
ω[k] := round(λ[k]^2*sqrt(EI/μ), 4) = [0.3896; 1.0733; 2.1048]
# [Excel component]
    excel["B4:B6"] := λ_kL
    excel["C4:C6"] := λ
    excel["D4:D6"] := ω
S_1(x, λ_k) := 1/2*(cosh(λ_k*x) + cos(λ_k*x))  # S
S_2(x, λ_k) := 1/2*(sinh(λ_k*x) + sin(λ_k*x))  # T
# Это функции Крылова
S_3(x, λ_k) := 1/2*(cosh(λ_k*x) - cos(λ_k*x))  # U
S_4(x, λ_k) := 1/2*(sinh(λ_k*x) - sin(λ_k*x))  # V
# Ненормированные функции форм
U_1тв(x) := 1
U_2тв(x) := x*2/L - 1
U_упр(x, λ_k) := S_1(x, λ_k) - S_3(L, λ_k)/S_4(L, λ_k)*S_2(x, λ_k)
U_1упр(x) := U_упр(x, λ[0])
U_2упр(x) := U_упр(x, λ[1])
U_3упр(x) := U_упр(x, λ[2])
U := transpose([U_1тв, U_2тв, U_1упр, U_2упр, U_3упр])
# Нормирующий множитель
n := 0 .. 4
N[n] := round(1/sqrt(sum((l[k] - l[k - 1])*m_(l[k])*(U[n](l[k]))^2, k = 1 .. 8)), 4) = [0.0091; 0.0128; 0.0168; 0.0175; 0.0159]
# [Excel component]
    excel["B2:F2"] := transpose(N)
# Нормированные функции форм:
f_1тв(x) := N[0]*U[0](x + L/2)
f_2тв(x) := N[1]*U[1](x + L/2)
f_1упр(x) := N[2]*U[2](x + L/2)
f_2упр(x) := N[3]*U[3](x + L/2)
f_3упр(x) := N[4]*U[4](x + L/2)
f := transpose([f_1тв, f_2тв, f_1упр, f_2упр, f_3упр])
# Производные
f_1тв_(x) := f_1тв'(x)
f_2тв_(x) := f_2тв'(x)
f_1упр_(x) := f_1упр'(x)
f_2упр_(x) := f_2упр'(x)
f_3упр_(x) := f_3упр'(x)
f_ := transpose([f_1тв_, f_2тв_, f_1упр_, f_2упр_, f_3упр_])
# Собственные частоты колебаний  мы получили в первом домашнем задании:
# [Excel component]
    excel["D2:F2"] := transpose(ω)
    λ := transpose(excel["B2:F2"])
a := 0.5
tab :=
    for k ∈ 0 .. 4
        tab[k, 0] ← round(f[k](a*L), 4)
        tab[k, 1] ← round(f_[k](a*L), 4)
        tab[k, 2] ← round(f[k](-a*L), 4)
        tab[k, 3] ← round(f_[k](-a*L), 4)
    return tab
tab = [
    0.0091, 0, 0.0091, 0;
    0.0128, 0.0011, -0.0128, 0.0011;
    0.0168, 0.0034, 0.0168, -0.0034;
    -0.0175, -0.006, 0.0175, -0.006;
    0.0159, 0.0076, 0.0159, -0.0076
]
# [Excel component]
    excel["B2:E6"] := tab
# Усилия от двигателей:
F_2(t) :=
    if 0 ≤ t < Δt
        return 0
    else if Δt ≤ t ≤ T + Δt
        return F(t - Δt)
    else
        return 0
F_1(t) :=
    if 0 ≤ t ≤ T
        return F(t)
    else
        return 0
# [plot: F_1(t), F_2(t) vs t]
# F_1(t), Н
# F_2(t), Н
T + 1
# t, с
T = 1.3
# Решаем систему уравнений:
solve block
    # constraints
    A''(x) == F_1(x)*(1 - 1/2*(f_1тв_(a*L)*A(x) + f_2тв_(a*L)*B(x) + f_1упр_(a*L)*C(x)*f_2упр_(a*L)*D(x) + f_3упр_(a*L)*E(x))^2)*f_1тв(a*L) + F_2(x)*(1 - 1/2*(f_1тв_(-a*L)*A(x) + f_2тв_(-a*L)*B(x) + f_1упр_(-a*L)*C(x)*f_2упр_(-a*L)*D(x) + f_3упр_(-a*L)*E(x))^2)*f_1тв(-a*L)
    B''(x) == F_1(x)*(1 - 1/2*(f_1тв_(a*L)*A(x) + f_2тв_(a*L)*B(x) + f_1упр_(a*L)*C(x)*f_2упр_(a*L)*D(x) + f_3упр_(a*L)*E(x))^2)*f_2тв(a*L) + F_2(x)*(1 - 1/2*(f_1тв_(-a*L)*A(x) + f_2тв_(-a*L)*B(x) + f_1упр_(-a*L)*C(x)*f_2упр_(-a*L)*D(x) + f_3упр_(-a*L)*E(x))^2)*f_2тв(-a*L)
    C''(x) + ω[0]^2*C(x) == F_1(x)*(1 - 1/2*(f_1тв_(a*L)*A(x) + f_2тв_(a*L)*B(x) + f_1упр_(a*L)*C(x)*f_2упр_(a*L)*D(x) + f_3упр_(a*L)*E(x))^2)*f_1упр(a*L) + F_2(x)*(1 - 1/2*(f_1тв_(-a*L)*A(x) + f_2тв_(-a*L)*B(x) + f_1упр_(-a*L)*C(x)*f_2упр_(-a*L)*D(x) + f_3упр_(-a*L)*E(x))^2)*f_1упр(-a*L)
    D''(x) + ω[1]^2*D(x) == F_1(x)*(1 - 1/2*(f_1тв_(a*L)*A(x) + f_2тв_(a*L)*B(x) + f_1упр_(a*L)*C(x)*f_2упр_(a*L)*D(x) + f_3упр_(a*L)*E(x))^2)*f_2упр(a*L) + F_2(x)*(1 - 1/2*(f_1тв_(-a*L)*A(x) + f_2тв_(-a*L)*B(x) + f_1упр_(-a*L)*C(x)*f_2упр_(-a*L)*D(x) + f_3упр_(-a*L)*E(x))^2)*f_2упр(-a*L)
    E''(x) + ω[2]^2*E(x) == F_1(x)*(1 - 1/2*(f_1тв_(a*L)*A(x) + f_2тв_(a*L)*B(x) + f_1упр_(a*L)*C(x)*f_2упр_(a*L)*D(x) + f_3упр_(a*L)*E(x))^2)*f_3упр(a*L) + F_2(x)*(1 - 1/2*(f_1тв_(-a*L)*A(x) + f_2тв_(-a*L)*B(x) + f_1упр_(-a*L)*C(x)*f_2упр_(-a*L)*D(x) + f_3упр_(-a*L)*E(x))^2)*f_3упр(-a*L)
    A(0) == 0
    B(0) == 0
    C(0) == 0
    D(0) == 0
    E(0) == 0
    A'(0) == 0
    B'(0) == 0
    C'(0) == 0
    D'(0) == 0
    E'(0) == 0
    # solver
    [S_01; S_02; S_1упр; S_2упр; S_3упр] := odesolve([A(x); B(x); C(x); D(x); E(x)], T + 1 + 0.001)
end solve block
S := [S_01, S_02, S_1упр, S_2упр, S_3упр]
S_01_(x) :=
    if x == 0
        return S_01'(0.0001)
    else
        return S_01'(x)
S_02_(x) :=
    if x == 0
        return S_02'(0.0001)
    else
        return S_02'(x)
S_1упр_(x) :=
    if x == 0
        return S_1упр'(0.0001)
    else
        return S_1упр'(x)
S_2упр_(x) :=
    if x == 0
        return S_2упр'(0.0001)
    else
        return S_2упр'(x)
S_3упр_(x) :=
    if x == 0
        return S_3упр'(0.0001)
    else
        return S_3упр'(x)
S_ := [S_01_, S_02_, S_1упр_, S_2упр_, S_3упр_]
i := 0 .. 10
t[i] := i*(T + 1)/10
t[10] = 2.3
tab :=
    for c ∈ (0 .. 10)
        tab[0, c] ← S_01(t[c])
        tab[1, c] ← S_02(t[c])
        tab[2, c] ← S_1упр(t[c])
        tab[3, c] ← S_2упр(t[c])
        tab[4, c] ← S_3упр(t[c])
    return tab
T = 1.3  # с
# [Excel component]
    excel["B2:K2"] := transpose(t)
    excel["B3:L9"] := tab
tab :=
    for c ∈ (0 .. 10)
        tab[0, c] ← S_01_(t[c])
        tab[1, c] ← S_02_(t[c])
        tab[2, c] ← S_1упр_(t[c])
        tab[3, c] ← S_2упр_(t[c])
        tab[4, c] ← S_3упр_(t[c])
    return tab
# [Excel component]
    excel["B2:K2"] := transpose(t)
    excel["B3:L9"] := tab
i := 0 .. 1000
t[i] := i*(1 + T)/1000
# [plot: S_01(t[i]) vs t[i]]
# [plot: S_01_(t[i]) vs t[i]]
# [plot: S_02(t[i]) vs t[i]]
# [plot: S_02_(t[i]) vs t[i]]
# [plot: S_1упр(t[i]) vs t[i]]
# [plot: S_1упр_(t[i]) vs t[i]]
# [plot: S_2упр(t[i]) vs t[i]]
# [plot: S_2упр_(t[i]) vs t[i]]
# [plot: S_3упр(t[i]) vs t[i]]
# [plot: S_3упр_(t[i]) vs t[i]]
θ_1(t) := (f_1тв_(a*L)*S_01(t) + f_2тв_(a*L)*S_02(t) + f_1упр_(a*L)*S_1упр(t) + f_2упр_(a*L)*S_2упр(t) + f_3упр_(a*L)*S_3упр(t))*180/π
vect_θ1[i] := θ_1(t[i])
max1 := max(vect_θ1)
min1 := min(vect_θ1)
av1 := (max1 - min1)/10
θ_2(t) := (f_1тв_(-a*L)*S_01(t) + f_2тв_(-a*L)*S_02(t) + f_1упр_(-a*L)*S_1упр(t) + f_2упр_(-a*L)*S_2упр(t) + f_3упр_(-a*L)*S_3упр(t))*180/π
vect_θ2[i] := θ_2(t[i])
max2 := max(vect_θ2)
min2 := min(vect_θ2)
av2 := (max2 - min2)/10
# [plot: θ_1(t[i]) vs t[i]]
# θ_1(t), град
# [plot: θ_2(t[i]) vs t[i]]
# θ_2(t), град
T + Δt = 1.45  # с
f_01 := f_1тв(0) = 0.0091
v_р := f_01*S_01_(T + Δt) = 0.810927  # м/c
v_эт = 0.833333  # м/c
S_01_(T + Δt) = 89.1129
# Коэффициент потери скорости
æ := (v_эт - v_р)/v_эт*100 = 2.68874  # %
